*Heading
** Job name: Deform_hole Model name: BEAM_2D_HOLE
** Generated by: Abaqus/CAE 2022
*Preprint, echo=NO, model=NO, history=NO, contact=NO
**
** PARTS
**
*Part, name=Beam
*Node
      1,        -950.,         125.
      2,       -987.5,         125.
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*Element, type=CPS4
 1,   1,  20, 398,  32
 2,  20,  21, 399, 398
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*Nset, nset=Whole, generate
    1,  1798,     1
*Elset, elset=Whole, generate
    1,  1616,     1
*Nset, nset=Fixed
  10,  11, 192, 193, 194, 195, 196, 197, 198, 199, 200
*Elset, elset=Fixed, generate
  184,  1516,   148
** Section: BeamSection
*Solid Section, elset=Whole, material=Wood
100.,
*End Part
**
**
** ASSEMBLY
**
*Assembly, name=Assembly
**
*Instance, name=Beam-1, part=Beam
*End Instance
**
*Nset, nset=LeftHalf, instance=Beam-1
   6,   9,  13,  17,  18,  42
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*Elset, elset=LeftHalf, instance=Beam-1
   21,   25,   29,   33, 1553, 1557, 1561, 1565, 1588, 1592, 1596, 1600, 1604, 1608, 1612, 1616
*Nset, nset=UpperHalf, instance=Beam-1
   2,   6,  15,  17,  18, 364
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*Elset, elset=UpperHalf, instance=Beam-1
 1533, 1537, 1541, 1545, 1549, 1572
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*Elset, elset=_NewLoad_S3, internal, instance=Beam-1, generate
 1369,  1516,     1
*Elset, elset=_NewLoad_S4, internal, instance=Beam-1
 1569, 1573, 1577, 1581, 1601, 1605, 1609, 1613
*Surface, type=ELEMENT, name=NewLoad
_NewLoad_S3, S3
_NewLoad_S4, S4
*End Assembly
**
** MATERIALS
**
*Material, name=Wood
*Elastic
10000., 0.3
**
** BOUNDARY CONDITIONS
**
** Name: Fixed Type: Displacement/Rotation
*Boundary
Beam-1.Fixed, 1, 1
Beam-1.Fixed, 2, 2
** Name: HorizontalConstraint Type: Displacement/Rotation
*Boundary
LeftHalf, 1, 1
** Name: VerticalConstraint Type: Displacement/Rotation
*Boundary
UpperHalf, 2, 2
** ----------------------------------------------------------------
**
** STEP: BeamLoad
**
*Step, name=BeamLoad, nlgeom=NO
*Static
0.1, 1., 1e-05, 1.
**
** LOADS
**
** Name: Pressure   Type: Pressure
*Dsload
NewLoad, P, 0.025
**
** OUTPUT REQUESTS
**
*Restart, write, frequency=0
**
** FIELD OUTPUT: F-Output-1
**
*Output, field, variable=PRESELECT
**
** HISTORY OUTPUT: H-Output-1
**
*Output, history, variable=PRESELECT
*End Step
