*Heading
** Job name: Deform Model name: BEAM_2D
** Generated by: Abaqus/CAE 2022
*Preprint, echo=NO, model=NO, history=NO, contact=NO
**
** PARTS
**
*Part, name=Beam
*Node
      1,       -1100.,          50.
      2,       -1050.,          50.
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*Element, type=CPS4
  1,   1,   2,  43,  42
  2,   2,   3,  44,  43
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*Nset, nset=Whole, generate
   1,  164,    1
*Elset, elset=Whole, generate
   1,  120,    1
*Nset, nset=Fixed, generate
  41,  164,   41
*Elset, elset=Fixed, generate
  40,  120,   40
** Section: BeamSection
*Solid Section, elset=Whole, material=Wood
100.,
*End Part
**
**
** ASSEMBLY
**
*Assembly, name=Assembly
**
*Instance, name=Beam-1, part=Beam
*End Instance
**
*Elset, elset=_BeamLoad_S3, internal, instance=Beam-1, generate
  81,  120,    1
*Surface, type=ELEMENT, name=BeamLoad
_BeamLoad_S3, S3
*End Assembly
**
** MATERIALS
**
*Material, name=Wood
*Elastic
10000., 0.3
**
** BOUNDARY CONDITIONS
**
** Name: Fixed Type: Displacement/Rotation
*Boundary
Beam-1.Fixed, 1, 1
Beam-1.Fixed, 2, 2
** ----------------------------------------------------------------
**
** STEP: BeamLoad
**
*Step, name=BeamLoad, nlgeom=NO
*Static
0.1, 1., 1e-05, 1.
**
** LOADS
**
** Name: Pressure   Type: Pressure
*Dsload
BeamLoad, P, 0.025
**
** OUTPUT REQUESTS
**
*Restart, write, frequency=0
**
** FIELD OUTPUT: F-Output-1
**
*Output, field, variable=PRESELECT
**
** HISTORY OUTPUT: H-Output-1
**
*Output, history, variable=PRESELECT
*End Step
