*Heading
** Job name: Axisymm_Flattop_5 Model name: Axisymm_Flattop
** Generated by: Abaqus/CAE 2022
*Preprint, echo=NO, model=NO, history=NO, contact=NO
**
** PARTS
**
*Part, name=Axisymm_Spherical
*End Part
**
**
** ASSEMBLY
**
*Assembly, name=Assembly
**
*Instance, name=Axisymm_Spherical-1, part=Axisymm_Spherical
*Node
      1,          80.,   296.003418
      2,          76.,         296.
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*Element, type=CAX4R
  1,    1,   21,  743,  253
  2,   21,   22,  744,  743
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*Nset, nset=Bolt_flange
  18,  19, 696, 697, 698, 699
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*Elset, elset=Bolt_flange, generate
 1656,  1776,     5
*Nset, nset=_PickedSet6, internal, generate
    1,  2136,     1
*Elset, elset=_PickedSet6, internal, generate
    1,  1776,     1
*Nset, nset=Set-1
  15,  17,  18, 630, 631, 632, 633, 634, 635, 636, 637, 638, 692, 693, 694, 695
*Elset, elset=Set-1
 1332, 1337, 1342, 1347, 1352, 1357, 1362, 1367, 1372, 1377, 1652, 1653, 1654, 1655, 1656
*Elset, elset=_Surf-1_S4, internal
    1,    6,   11,   16,   21,   26
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*Elset, elset=_Surf-1_S3, internal, generate
 686,  690,    1
*Elset, elset=_Surf-1_S2, internal
  695,  700,  705,  710,  715,  720
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*Surface, type=ELEMENT, name=Surf-1
_Surf-1_S4, S4
_Surf-1_S3, S3
_Surf-1_S2, S2
** Section: AxiSection
*Solid Section, elset=_PickedSet6, material="Titanium Ti-6Al-4V"
,
*End Instance
**
*End Assembly
**
** MATERIALS
**
*Material, name="Titanium Ti-6Al-4V"
*Density
 4.43e-09,
*Elastic
113800., 0.342
**
** BOUNDARY CONDITIONS
**
** Name: InnerEdge Type: Displacement/Rotation
*Boundary
Axisymm_Spherical-1.Set-1, 1, 1
** Name: RadialConstrain Type: Displacement/Rotation
*Boundary
Axisymm_Spherical-1.Bolt_flange, 1, 1
Axisymm_Spherical-1.Bolt_flange, 2, 2
** ----------------------------------------------------------------
**
** STEP: Loadstep
**
*Step, name=Loadstep, nlgeom=NO
*Static
1., 1., 1e-05, 1.
**
** LOADS
**
** Name: PressureLoad   Type: Pressure
*Dsload
Axisymm_Spherical-1.Surf-1, P, 19.62
**
** OUTPUT REQUESTS
**
*Restart, write, frequency=0
**
** FIELD OUTPUT: F-Output-1
**
*Output, field, variable=PRESELECT
**
** HISTORY OUTPUT: H-Output-2
**
*Output, history
*Node Output, nset=Axisymm_Spherical-1.Bolt_flange
RF2,
**
** HISTORY OUTPUT: H-Output-1
**
*Output, history, variable=PRESELECT
*End Step
