*Heading
** Job name: BEAM_HOLES_12_5 Model name: BEAM_HOLES
** Generated by: Abaqus/CAE 2022
*Preprint, echo=NO, model=NO, history=NO, contact=NO
**
** PARTS
**
*Part, name=Beam
*Node
      1,        -850.,           0.,         100.
      2,        -850.,           0.,           0.
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*Element, type=C3D8R
  1,    1,   69, 1195,   92,  121, 1305, 7659, 1265
  2,   69,   70, 1196, 1195, 1305, 1306, 7660, 7659
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*Nset, nset=Fixed
   65,   66,   67,   68,  910,  911
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*Elset, elset=Fixed, generate
  8076,  15296,     76
*Nset, nset=Whole, generate
     1,  19299,      1
*Elset, elset=Whole, generate
     1,  15552,      1
** Section: BeamSection
*Solid Section, elset=Whole, material=Wood
,
*End Part
**
**
** ASSEMBLY
**
*Assembly, name=Assembly
**
*Instance, name=Beam-1, part=Beam
*End Instance
**
*Nset, nset=HoleFixU2, instance=Beam-1
    5,    6,   19,   20,   21,   22
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*Elset, elset=HoleFixU2, instance=Beam-1
  593,  594,  595,  596,  597,  598
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*Nset, nset=HoleU1Fixed, instance=Beam-1
    9,   10,   11,   12,   21,   22
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*Elset, elset=HoleU1Fixed, instance=Beam-1
  241,  242,  243,  244,  245,  246
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*Elset, elset=_Surf-Load-Holes_S1, internal, instance=Beam-1
   769,   770,   771,   772,   773,   774
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*Elset, elset=_Surf-Load-Holes_S3, internal, instance=Beam-1
 1281, 1282, 1283, 1284, 1285, 1286
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*Elset, elset=_Surf-Load-Holes_S6, internal, instance=Beam-1, generate
 15457,  15541,     12
*Elset, elset=_Surf-Load-Holes_S2, internal, instance=Beam-1, generate
 1121,  1152,     1
*Elset, elset=_Surf-Load-Holes_S4, internal, instance=Beam-1
 7436, 7448, 7460, 7472, 7484, 7496
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*Surface, type=ELEMENT, name=Surf-Load-Holes
_Surf-Load-Holes_S1, S1
_Surf-Load-Holes_S3, S3
_Surf-Load-Holes_S6, S6
_Surf-Load-Holes_S2, S2
_Surf-Load-Holes_S4, S4
*End Assembly
**
** MATERIALS
**
*Material, name=Wood
*Elastic
10000., 0.3
** ----------------------------------------------------------------
**
** STEP: BeamLoad
**
*Step, name=BeamLoad, nlgeom=NO
*Static
0.1, 1., 1e-05, 1.
**
** BOUNDARY CONDITIONS
**
** Name: Fixed Type: Displacement/Rotation
*Boundary
Beam-1.Fixed, 1, 1
Beam-1.Fixed, 2, 2
Beam-1.Fixed, 3, 3
** Name: HoleU1Fixed Type: Displacement/Rotation
*Boundary
HoleU1Fixed, 1, 1
** Name: HoleVertical Type: Displacement/Rotation
*Boundary
HoleFixU2, 2, 2
**
** LOADS
**
** Name: Pressure   Type: Pressure
*Dsload
Surf-Load-Holes, P, 0.1
**
** OUTPUT REQUESTS
**
*Restart, write, frequency=0
**
** FIELD OUTPUT: F-Output-1
**
*Output, field, variable=PRESELECT
**
** HISTORY OUTPUT: H-Output-1
**
*Output, history, variable=PRESELECT
*End Step
