*Heading
** Job name: Deform Model name: BEAM
** Generated by: Abaqus/CAE 2022
*Preprint, echo=NO, model=NO, history=NO, contact=NO
**
** PARTS
**
*Part, name=Beam
*Node
      1,        1000.,          75.,         100.
      2,        1000.,          25.,         100.
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*Element, type=C3D8R
  1,  13,  14,  18,  17,   1,   2,   6,   5
  2,  14,  15,  19,  18,   2,   3,   7,   6
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*Nset, nset=Fixed, generate
  1,  12,   1
*Elset, elset=Fixed, generate
 1,  6,  1
*Nset, nset=Whole, generate
   1,  492,    1
*Elset, elset=Whole, generate
   1,  240,    1
** Section: BeamSection
*Solid Section, elset=Whole, material=Wood
,
*End Part
**
**
** ASSEMBLY
**
*Assembly, name=Assembly
**
*Instance, name=Beam-1, part=Beam
*End Instance
**
*Elset, elset=_BeamLoad_S6, internal, instance=Beam-1, generate
   1,  238,    3
*Surface, type=ELEMENT, name=BeamLoad
_BeamLoad_S6, S6
*Elset, elset=_BeamLoad1_S6, internal, instance=Beam-1, generate
   1,  238,    3
*Surface, type=ELEMENT, name=BeamLoad1
_BeamLoad1_S6, S6
*End Assembly
**
** MATERIALS
**
*Material, name=Wood
*Elastic
10000., 0.3
** ----------------------------------------------------------------
**
** STEP: BeamLoad
**
*Step, name=BeamLoad, nlgeom=NO
*Static
0.1, 1., 1e-05, 1.
**
** BOUNDARY CONDITIONS
**
** Name: Fixed Type: Displacement/Rotation
*Boundary
Beam-1.Fixed, 1, 1
Beam-1.Fixed, 2, 2
Beam-1.Fixed, 3, 3
**
** LOADS
**
** Name: Pressure   Type: Pressure
*Dsload
BeamLoad1, P, 0.025
**
** OUTPUT REQUESTS
**
*Restart, write, frequency=0
**
** FIELD OUTPUT: F-Output-1
**
*Output, field, variable=PRESELECT
**
** HISTORY OUTPUT: H-Output-1
**
*Output, history, variable=PRESELECT
*End Step
