*Heading
** Job name: DeformPL Model name: Rooftop-PL
** Generated by: Abaqus/CAE 2022
*Preprint, echo=NO, model=NO, history=NO, contact=NO
**
** PARTS
**
*Part, name=Rooftop
*Node
      1,       -4000.,       -4000.,           0.
      2,      -12000.,       -4000.,           0.
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*Element, type=S4
  1,   1,  17, 233,  52
  2,  17,  18, 234, 233
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*Nset, nset=Slab, generate
   1,  961,    1
*Elset, elset=Slab, generate
   1,  900,    1
** Section: Slab
*Shell Section, elset=Slab, material=Concrete
250., 5
*End Part
**
**
** ASSEMBLY
**
*Assembly, name=Assembly
**
*Instance, name=Rooftop-1, part=Rooftop
*End Instance
**
*Node
      1,       -3700.,       -3100.,           0.
*Node
      2,       -3700.,        -900.,           0.
*Node
      3,       -3700.,         900.,           0.
*Node
      4,       -3700.,        3100.,           0.
*Node
      5,       -2200.,       -3100.,           0.
*Node
      6,       -2200.,        -900.,           0.
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*Nset, nset=Columns_point, instance=Rooftop-1, generate
  1,  16,   1
*Nset, nset=PointLoads, instance=Rooftop-1
 188, 191, 193, 196, 215, 218
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*Elset, elset=_Load_SPOS, internal, instance=Rooftop-1, generate
 801,  900,    1
*Surface, type=ELEMENT, name=Load
_Load_SPOS, SPOS
*End Assembly
**
** MATERIALS
**
*Material, name=Concrete
*Elastic
32000., 0.2
**
** BOUNDARY CONDITIONS
**
** Name: Column_support Type: Displacement/Rotation
*Boundary
Columns_point, 3, 3
** ----------------------------------------------------------------
**
** STEP: Load
**
*Step, name=Load, nlgeom=NO
*Static
0.1, 1., 1e-05, 1.
**
** LOADS
**
** Name: PointLoads   Type: Concentrated force
*Cload
PointLoads, 3, -17800.
**
** OUTPUT REQUESTS
**
*Restart, write, frequency=0
**
** FIELD OUTPUT: F-Output-1
**
*Output, field, variable=PRESELECT
**
** HISTORY OUTPUT: H-Output-1
**
*Output, history, variable=PRESELECT
*End Step
