*Heading
** Job name: 1D_B33_30 Model name: BEAM_1D
** Generated by: Abaqus/CAE 2022
*Preprint, echo=NO, model=NO, history=NO, contact=NO
**
** PARTS
**
*Part, name=Beam
*Node
      1,           0.,           0.,           0.
      2,          30.,           0.,           0.
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*Element, type=B33
 1,  1,  2
 2,  2,  3
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*Nset, nset=WholeBeam, generate
  1,  31,   1
*Elset, elset=WholeBeam, generate
  1,  30,   1
** Section: BeamSection  Profile: Beam
*Beam Section, elset=WholeBeam, material=Steel, temperature=GRADIENTS, section=ARBITRARY
3, 47.5, 71., 0., 71., 8.
0., -71., 5.
47.5, -71., 8.
0.,0.,-1.
*End Part
**
**
** ASSEMBLY
**
*Assembly, name=Assembly
**
*Instance, name=Beam-1, part=Beam
*End Instance
**
*Nset, nset=FixedNode, instance=Beam-1
 31,
*Nset, nset=LoadNode, instance=Beam-1
 1,
*End Assembly
**
** MATERIALS
**
*Material, name=Steel
*Density
 7.8e-09,
*Elastic
210000., 0.3
**
** BOUNDARY CONDITIONS
**
** Name: Fixed Type: Symmetry/Antisymmetry/Encastre
*Boundary
FixedNode, ENCASTRE
** ----------------------------------------------------------------
**
** STEP: Load
**
*Step, name=Load, nlgeom=NO
*Static
0.1, 1., 1e-05, 1.
**
** LOADS
**
** Name: ConcentratedForce   Type: Concentrated force
*Cload, op=NEW
LoadNode, 2, -10000.
** Name: Moment   Type: Moment
*Cload, op=NEW
LoadNode, 4, -237500.
**
** OUTPUT REQUESTS
**
*Restart, write, frequency=0
**
** FIELD OUTPUT: F-Output-1
**
*Output, field, variable=PRESELECT
**
** HISTORY OUTPUT: H-Output-1
**
*Output, history, variable=PRESELECT
*End Step
