*Heading
** Job name: SHELL_S4_30 Model name: BEAM_SHELL
** Generated by: Abaqus/CAE 2022
*Preprint, echo=NO, model=NO, history=NO, contact=NO
**
** PARTS
**
*Part, name=Beam
*Node
      1,         47.5,           0.,         900.
      2,           0.,           0.,         900.
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*Element, type=S4
 1,   1,   9, 137,  68
 2,   9,   2,  10, 137
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*Nset, nset=Web
   2,   3,   5,   6,  10,  11
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*Elset, elset=Web, generate
  61,  210,    1
*Nset, nset=Flange
   1,   2,   3,   4,   5,   6
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*Elset, elset=Flange
   1,   2,   3,   4,   5,   6
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** Section: Flange
*Shell Section, elset=Flange, material=Steel
8., 5
** Section: Web
*Shell Section, elset=Web, material=Steel
5., 5
*End Part
**
**
** ASSEMBLY
**
*Assembly, name=Assembly
**
*Instance, name=Beam-1, part=Beam
*End Instance
**
*Nset, nset=Set-1, instance=Beam-1
   3,   4,   6,   8,  39, 102, 103, 104, 105, 136
*Elset, elset=Set-1, instance=Beam-1
  59,  60, 206, 207, 208, 209, 210, 269, 270
*Elset, elset=_EdgeLoad_E1, internal, instance=Beam-1
 211, 212
*Surface, type=ELEMENT, name=EdgeLoad
_EdgeLoad_E1, E1
*End Assembly
**
** MATERIALS
**
*Material, name=Steel
*Density
 7.8e-09,
*Elastic
210000., 0.3
**
** BOUNDARY CONDITIONS
**
** Name: Fixed Type: Displacement/Rotation
*Boundary
Set-1, 1, 1
Set-1, 2, 2
Set-1, 3, 3
Set-1, 4, 4
Set-1, 5, 5
Set-1, 6, 6
** ----------------------------------------------------------------
**
** STEP: Load
**
*Step, name=Load, nlgeom=NO
*Static
0.1, 1., 1e-05, 1.
**
** LOADS
**
** Name: Load   Type: Shell edge load
*Dsload
EdgeLoad, EDTRA, -216.
**
** OUTPUT REQUESTS
**
*Restart, write, frequency=0
**
** FIELD OUTPUT: F-Output-1
**
*Output, field, variable=PRESELECT
**
** HISTORY OUTPUT: H-Output-1
**
*Output, history, variable=PRESELECT
*End Step
