*Heading
** Job name: lp_fine Model name: Model-1
** Generated by: Abaqus/CAE 2024
*Preprint, echo=NO, model=NO, history=NO, contact=NO
**
** PARTS
**
*Part, name=excersize
*Node
      1,   249.949951,  -5.00220203,         500.
      2,    249.79982,  -10.0024014,         500.
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*Element, type=S4R
    1,   314,     1,   315,   628
    2,     1,     2,   316,   315
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*Nset, nset=Set-1, generate
     1,  31714,      1
*Elset, elset=Set-1, generate
     1,  31400,      1
** Section: Section-1
*Shell Section, elset=Set-1, material=alu
2., 5
*End Part
**
**
** ASSEMBLY
**
*Assembly, name=Assembly
**
*Instance, name=excersize-1, part=excersize
*End Instance
**
*Node
      1,           0.,           0.,           0.
*Node
      2,           0., -1.53080843e-14,         500.
*Nset, nset=Set-5
 1,
*Nset, nset=Set-6
 2,
*Nset, nset=m_Set-1
 1,
*Nset, nset=m_Set-3
 2,
*Nset, nset=s_Set-1, instance=excersize-1, generate
 31401,  31714,      1
*Elset, elset=s_Set-1, instance=excersize-1, generate
 31087,  31400,      1
*Nset, nset=s_Set-3, instance=excersize-1, generate
   1,  314,    1
*Elset, elset=s_Set-3, instance=excersize-1, generate
   1,  314,    1
*Surface, type=NODE, name=s_Set-1_CNS_, internal
s_Set-1, 1.
*Surface, type=NODE, name=s_Set-3_CNS_, internal
s_Set-3, 1.
** Constraint: rp1
*Coupling, constraint name=rp1, ref node=m_Set-1, surface=s_Set-1_CNS_
*Kinematic
** Constraint: rp2
*Coupling, constraint name=rp2, ref node=m_Set-3, surface=s_Set-3_CNS_
*Kinematic
*End Assembly
**
** MATERIALS
**
*Material, name=alu
*Elastic
72000., 0.35
*Plastic
160.,  0.
340., 0.3
**
** BOUNDARY CONDITIONS
**
** Name: encaster Type: Displacement/Rotation
*Boundary
Set-5, 1, 1
Set-5, 2, 2
Set-5, 3, 3
Set-5, 4, 4
Set-5, 5, 5
Set-5, 6, 6
** ----------------------------------------------------------------
**
** STEP: lin_pert
**
*Step, name=lin_pert, nlgeom=NO, perturbation
*Buckle
3, , 6, 6500
**
** BOUNDARY CONDITIONS
**
** Name: encaster Type: Displacement/Rotation
*Boundary, op=NEW, load case=1
Set-5, 1, 1
Set-5, 2, 2
Set-5, 3, 3
Set-5, 4, 4
Set-5, 5, 5
Set-5, 6, 6
*Boundary, op=NEW, load case=2
Set-5, 1, 1
Set-5, 2, 2
Set-5, 3, 3
Set-5, 4, 4
Set-5, 5, 5
Set-5, 6, 6
**
** LOADS
**
** Name: lp   Type: Concentrated force
*Cload
Set-6, 3, -1.
**
** OUTPUT REQUESTS
**
*Restart, write, frequency=0
**
** FIELD OUTPUT: F-Output-1
**
*Output, field, variable=PRESELECT
*End Step
