*Heading
** Job name: turbo_job Model name: Model-1
** Generated by: Abaqus/CAE 2024
*Preprint, echo=NO, model=NO, history=NO, contact=NO
**
** PARTS
**
*Part, name=Part-1
*Node
      1,           0.,   221.199997,         7.75
      2,           0.,   216.172729,         7.75
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*Element, type=S4R
   1,    1,    2,   47,   46
   2,    2,    3,   48,   47
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*Nset, nset=Set-1, generate
    1,  2880,     1
*Elset, elset=Set-1, generate
    1,  2772,     1
*Nset, nset=points_load
  694,  958, 1413, 1433, 1902, 2132
** Section: mb_section
*Shell Section, elset=Set-1, material=apple_alu
15.5, 5
*End Part
**
**
** ASSEMBLY
**
*Assembly, name=Assembly
**
*Instance, name=Part-1-1, part=Part-1
*End Instance
**
*Nset, nset=Set-1, instance=Part-1-1
    1,   45, 2836, 2880
*Nset, nset=Set-3, instance=Part-1-1
    1,    2,    3,    4,    5,    6
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*Elset, elset=Set-3, instance=Part-1-1
    1,    2,    3,    4,    5,    6
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*Nset, nset=Set-4, instance=Part-1-1
    1,    2,    3,    4,    5,    6
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*Elset, elset=Set-4, instance=Part-1-1
    1,    2,    3,    4,    5,    6
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*Nset, nset=Set-5, instance=Part-1-1
    1,    2,    3,    4,    5,    6
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*Elset, elset=Set-5, instance=Part-1-1
    1,    2,    3,    4,    5,    6
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*Nset, nset=points_assembly, instance=Part-1-1
  840,  916, 1374, 1967, 2217
*Elset, elset=_Surf-1_SPOS, internal, instance=Part-1-1, generate
    1,  2772,     1
*Surface, type=ELEMENT, name=Surf-1
_Surf-1_SPOS, SPOS
*Elset, elset=_Surf-2_SPOS, internal, instance=Part-1-1, generate
    1,  2772,     1
*Surface, type=ELEMENT, name=Surf-2
_Surf-2_SPOS, SPOS
*Elset, elset=_Surf-3_SPOS, internal, instance=Part-1-1, generate
    1,  2772,     1
*Surface, type=ELEMENT, name=Surf-3
_Surf-3_SPOS, SPOS
*End Assembly
**
** MATERIALS
**
*Material, name=apple_alu
*Elastic
72000., 0.333
** ----------------------------------------------------------------
**
** STEP: turbo
**
*Step, name=turbo, nlgeom=NO, inc=200
*Static
0.01, 1., 1e-05, 0.01
**
** BOUNDARY CONDITIONS
**
** Name: ss_static Type: Displacement/Rotation
*Boundary
Set-5, 1, 1
Set-5, 2, 2
Set-5, 3, 3
**
** LOADS
**
** Name: s_ss_uniformed   Type: Pressure
*Dsload
Surf-3, P, 2.
**
** OUTPUT REQUESTS
**
*Restart, write, frequency=0
**
** FIELD OUTPUT: F-Output-2
**
*Output, field, variable=PRESELECT
**
** HISTORY OUTPUT: H-Output-2
**
*Output, history, variable=PRESELECT
*End Step
