*Heading
** Job name: feets Model name: Model-1
** Generated by: Abaqus/CAE 2024
*Preprint, echo=NO, model=NO, history=NO, contact=NO
**
** PARTS
**
*Part, name=Part-1
*Node
      1,   264.128937,   41.0710678,         7.75
      2,   44.5622787,   196.686829,         7.75
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*Element, type=S4R
1,  11,  12, 139,  10
2,   9,  10, 139,   1
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*Element, type=S3
 9, 141,  26,  27
10,  23,  24, 142
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*Nset, nset=Set-1, generate
    1,  1057,     1
*Elset, elset=Set-1, generate
    1,  1016,     1
*Nset, nset=display_with_feet
  749,  750,  783,  784,  785,  786
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** Section: mb_section
*Shell Section, elset=Set-1, material=apple_alu
15.5, 5
*End Part
**
**
** ASSEMBLY
**
*Assembly, name=Assembly
**
*Instance, name=Part-1-1, part=Part-1
*End Instance
**
*Nset, nset=Set-1, instance=Part-1-1, generate
 4,  7,  1
*Nset, nset=Set-3, instance=Part-1-1
   4,   5,   6,   7,  30,  31
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*Elset, elset=Set-3, instance=Part-1-1
  39,  40,  42,  43,  46,  48
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*Nset, nset=Set-4, instance=Part-1-1
   4,   5,   6,   7,  30,  31
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*Elset, elset=Set-4, instance=Part-1-1
  39,  40,  42,  43,  46,  48
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*Nset, nset=Set-5, instance=Part-1-1
   4,   5,   6,   7,  30,  31
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*Elset, elset=Set-5, instance=Part-1-1
  39,  40,  42,  43,  46,  48
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*Nset, nset=Set-6, instance=Part-1-1
    1,    2,    3,    8,    9,   10
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*Elset, elset=Set-6, instance=Part-1-1
    1,    2,    3,    4,    5,    6
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*Elset, elset=_Surf-1_SPOS, internal, instance=Part-1-1, generate
    1,  1016,     1
*Surface, type=ELEMENT, name=Surf-1
_Surf-1_SPOS, SPOS
*Elset, elset=_Surf-2_SPOS, internal, instance=Part-1-1, generate
    1,  1016,     1
*Surface, type=ELEMENT, name=Surf-2
_Surf-2_SPOS, SPOS
*Elset, elset=_Surf-3_SPOS, internal, instance=Part-1-1, generate
    1,  1016,     1
*Surface, type=ELEMENT, name=Surf-3
_Surf-3_SPOS, SPOS
*Elset, elset=_Surf-4_SPOS, internal, instance=Part-1-1, generate
    1,  1016,     1
*Surface, type=ELEMENT, name=Surf-4
_Surf-4_SPOS, SPOS
*End Assembly
**
** MATERIALS
**
*Material, name=apple_alu
*Elastic
72000., 0.333
** ----------------------------------------------------------------
**
** STEP: turbo
**
*Step, name=turbo, nlgeom=NO, inc=200
*Static
0.01, 1., 1e-05, 0.01
**
** BOUNDARY CONDITIONS
**
** Name: feet_BC Type: Displacement/Rotation
*Boundary
Set-6, 1, 1
Set-6, 2, 2
Set-6, 3, 3
**
** LOADS
**
** Name: pressure   Type: Pressure
*Dsload
Surf-4, P, 2.
**
** OUTPUT REQUESTS
**
*Restart, write, frequency=0
**
** FIELD OUTPUT: F-Output-2
**
*Output, field, variable=PRESELECT
**
** HISTORY OUTPUT: reaction_force
**
*Output, history
*Node Output, nset=Set-6
RF3,
**
** HISTORY OUTPUT: displaysment_feet
**
*Node Output, nset=Part-1-1.display_with_feet
U3,
*End Step
