*Heading
** Job name: ss_points Model name: Model-1
** Generated by: Abaqus/CAE 2024
*Preprint, echo=NO, model=NO, history=NO, contact=NO
**
** PARTS
**
*Part, name=Part-1
*Node
      1,           0.,   221.199997,         7.75
      2,           0.,   216.172729,         7.75
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*Element, type=S4R
   1,    1,    2,   47,   46
   2,    2,    3,   48,   47
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*Nset, nset=Set-1, generate
    1,  2880,     1
*Elset, elset=Set-1, generate
    1,  2772,     1
*Nset, nset=points_load
  694,  958, 1413, 1433, 1902, 2132
** Section: mb_section
*Shell Section, elset=Set-1, material=apple_alu
15.5, 5
*End Part
**
**
** ASSEMBLY
**
*Assembly, name=Assembly
**
*Instance, name=Part-1-1, part=Part-1
*End Instance
**
*Nset, nset=Set-1, instance=Part-1-1
    1,   45, 2836, 2880
*Nset, nset=Set-3, instance=Part-1-1
    1,    2,    3,    4,    5,    6
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*Elset, elset=Set-3, instance=Part-1-1
    1,    2,    3,    4,    5,    6
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*Nset, nset=Set-4, instance=Part-1-1
    1,    2,    3,    4,    5,    6
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*Elset, elset=Set-4, instance=Part-1-1
    1,    2,    3,    4,    5,    6
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*Nset, nset=points_assembly, instance=Part-1-1
  840,  916, 1374, 1967, 2217
*Elset, elset=_Surf-1_SPOS, internal, instance=Part-1-1, generate
    1,  2772,     1
*Surface, type=ELEMENT, name=Surf-1
_Surf-1_SPOS, SPOS
*Elset, elset=_Surf-2_SPOS, internal, instance=Part-1-1, generate
    1,  2772,     1
*Surface, type=ELEMENT, name=Surf-2
_Surf-2_SPOS, SPOS
*End Assembly
**
** MATERIALS
**
*Material, name=apple_alu
*Elastic
72000., 0.333
**
** BOUNDARY CONDITIONS
**
** Name: fixed Type: Displacement/Rotation
*Boundary
Set-1, 1, 1
Set-1, 2, 2
Set-1, 3, 3
Set-1, 4, 4
Set-1, 5, 5
Set-1, 6, 6
** ----------------------------------------------------------------
**
** STEP: ss_points
**
*Step, name=ss_points, nlgeom=NO, perturbation
*Static
**
** BOUNDARY CONDITIONS
**
** Name: fixed Type: Displacement/Rotation
*Boundary, op=NEW
** Name: ss Type: Displacement/Rotation
*Boundary, op=NEW
Set-4, 1, 1
Set-4, 2, 2
Set-4, 3, 3
**
** LOADS
**
** Name: points   Type: Concentrated force
*Cload, op=NEW
points_assembly, 3, -2.
**
** OUTPUT REQUESTS
**
**
** FIELD OUTPUT: F-Output-1
**
*Output, field
*Node Output
CF, RF, U
*Element Output, directions=YES
LE, S, SF
**
** HISTORY OUTPUT: H-Output-1
**
*Output, history, variable=PRESELECT
*End Step
** ----------------------------------------------------------------
**
** STEP: simple_test
**
*Step, name=simple_test, nlgeom=NO, perturbation
*Static
**
** BOUNDARY CONDITIONS
**
** Name: fixed Type: Displacement/Rotation
*Boundary, op=NEW
** Name: simple_test_BC Type: Displacement/Rotation
*Boundary, op=NEW
Set-4, 1, 1
Set-4, 2, 2
Set-4, 3, 3
**
** LOADS
**
** Name: q   Type: Pressure
*Dsload, op=NEW
Surf-2, P, 2.
**
** OUTPUT REQUESTS
**
**
** FIELD OUTPUT: F-Output-1
**
*Output, field
*Node Output
CF, RF, U
*Element Output, directions=YES
LE, S, SF
**
** HISTORY OUTPUT: H-Output-1
**
*Output, history, variable=PRESELECT
*End Step
** ----------------------------------------------------------------
**
** STEP: clamped_edges
**
*Step, name=clamped_edges, nlgeom=NO, perturbation
*Static
**
** BOUNDARY CONDITIONS
**
** Name: clamped_edges Type: Displacement/Rotation
*Boundary, op=NEW
Set-3, 1, 1
Set-3, 2, 2
Set-3, 3, 3
Set-3, 4, 4
Set-3, 5, 5
Set-3, 6, 6
** Name: fixed Type: Displacement/Rotation
*Boundary, op=NEW
**
** LOADS
**
** Name: uniformed_load-Copy   Type: Pressure
*Dsload, op=NEW
Surf-1, P, 1.44619e-05
**
** OUTPUT REQUESTS
**
**
** FIELD OUTPUT: F-Output-1
**
*Output, field
*Node Output
CF, RF, U
*Element Output, directions=YES
LE, S, SF
**
** HISTORY OUTPUT: H-Output-1
**
*Output, history, variable=PRESELECT
*End Step
** ----------------------------------------------------------------
**
** STEP: points_load
**
*Step, name=points_load, nlgeom=NO, perturbation
*Static
**
** LOADS
**
** Name: points_loads   Type: Concentrated force
*Cload, op=NEW
points_assembly, 3, -0.0005
**
** OUTPUT REQUESTS
**
**
** FIELD OUTPUT: F-Output-1
**
*Output, field
*Node Output
CF, RF, U
*Element Output, directions=YES
LE, S, SF
**
** HISTORY OUTPUT: H-Output-1
**
*Output, history, variable=PRESELECT
*End Step
** ----------------------------------------------------------------
**
** STEP: uniformed_load
**
*Step, name=uniformed_load, nlgeom=NO, perturbation
*Static
**
** LOADS
**
** Name: uniformed_load   Type: Pressure
*Dsload, op=NEW
Surf-1, P, 1.44619e-05
**
** OUTPUT REQUESTS
**
**
** FIELD OUTPUT: F-Output-1
**
*Output, field
*Node Output
CF, RF, U
*Element Output, directions=YES
LE, S, SF
**
** HISTORY OUTPUT: H-Output-1
**
*Output, history, variable=PRESELECT
*End Step
