*Heading
** Job name: mb_ss_partition Model name: Model-1
** Generated by: Abaqus/CAE 2023
*Preprint, echo=NO, model=NO, history=NO, contact=NO
**
** PARTS
**
*Part, name=Part-1
*Node
      1,   98.8499985,   168.050003,         7.75
      2,   98.8499985,   53.1500015,         7.75
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*Element, type=S4R5
  1,  48, 151,   9,   1
  2, 151, 152,  10,   9
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*Element, type=S3
122, 380, 372, 560
123, 415, 549, 559
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*Nset, nset=Set-2, generate
   1,  802,    1
*Elset, elset=Set-2, generate
   1,  754,    1
** Section: shell_5mm
*Shell Section, elset=Set-2, material=alu
5., 5
*End Part
**
**
** ASSEMBLY
**
*Assembly, name=Assembly
**
*Instance, name=Part-1-1, part=Part-1
*End Instance
**
*Nset, nset=Set-1, instance=Part-1-1
   5,   6,   7,   8,  49,  50
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*Elset, elset=Set-1, instance=Part-1-1
 142, 144, 145, 147, 148, 149
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*Nset, nset=Set-2, instance=Part-1-1
 7,
*Nset, nset=Set-3, instance=Part-1-1
 6,
*Elset, elset=_Surf-1_SNEG, internal, instance=Part-1-1, generate
   1,  754,    1
*Surface, type=ELEMENT, name=Surf-1
_Surf-1_SNEG, SNEG
*Elset, elset=_Surf-2_SNEG, internal, instance=Part-1-1, generate
   1,  754,    1
*Surface, type=ELEMENT, name=Surf-2
_Surf-2_SNEG, SNEG
*Elset, elset=_Surf-3_SNEG, internal, instance=Part-1-1, generate
   1,  121,    1
*Surface, type=ELEMENT, name=Surf-3
_Surf-3_SNEG, SNEG
*End Assembly
**
** MATERIALS
**
*Material, name=alu
*Elastic
72000., 0.333
**
** BOUNDARY CONDITIONS
**
** Name: BC-2 Type: Displacement/Rotation
*Boundary
Set-2, 1, 1
Set-2, 2, 2
** Name: reduce_rotation Type: Displacement/Rotation
*Boundary
Set-3, 1, 1
** Name: simple_supports Type: Displacement/Rotation
*Boundary
Set-1, 3, 3
** ----------------------------------------------------------------
**
** STEP: Step-3
**
*Step, name=Step-3, nlgeom=NO, perturbation
*Static
**
** LOADS
**
** Name: Load-3   Type: Pressure
*Dsload
Surf-3, P, 2.
**
** OUTPUT REQUESTS
**
**
** FIELD OUTPUT: F-Output-2-Copy
**
*Output, field
*Node Output
CF, RF, U
*Element Output, directions=YES
LE, S, SF
**
** HISTORY OUTPUT: H-Output-2-Copy
**
*Output, history, variable=PRESELECT
*End Step
** ----------------------------------------------------------------
**
** STEP: linear_pertubation
**
*Step, name=linear_pertubation, nlgeom=NO, perturbation
*Static
**
** LOADS
**
** Name: pressure   Type: Pressure
*Dsload
Surf-1, P, 0.0005
**
** OUTPUT REQUESTS
**
**
** FIELD OUTPUT: F-Output-2, F-Output-2-Copy
**
*Output, field
*Node Output
CF, RF, U
*Element Output, directions=YES
LE, S, SF
**
** HISTORY OUTPUT: H-Output-2, H-Output-2-Copy
**
*Output, history, variable=PRESELECT
*End Step
** ----------------------------------------------------------------
**
** STEP: load
**
*Step, name=load, nlgeom=NO
*Static
1., 1., 1e-05, 1.
**
** OUTPUT REQUESTS
**
*Restart, write, frequency=0
**
** FIELD OUTPUT: F-Output-1
**
*Output, field
*Node Output
CF, RF, U
*Element Output, directions=YES
LE, PE, PEEQ, PEMAG, S, SF
*Contact Output
CDISP, CSTRESS
**
** HISTORY OUTPUT: H-Output-1
**
*Output, history, variable=PRESELECT
*End Step
