*Heading
** Job name: mb_us_randomM Model name: Model-1
** Generated by: Abaqus/CAE 2024
*Preprint, echo=NO, model=NO, history=NO, contact=NO
**
** PARTS
**
*Part, name=mb_16
*Node
      1,   156.300003,  -85.5999985,         7.75
      2,   156.300003,  -66.4499969,         7.75
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*Element, type=S4R
 1,   1,  30, 468,  45
 2,  30,  31, 469, 468
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*Element, type=S3
101, 550, 561, 546
102, 559, 537,  97
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*Nset, nset=Set-1, generate
    1,  5229,     1
*Elset, elset=Set-1, generate
    1,  5170,     1
** Section: mb_sec
*Shell Section, elset=Set-1, material=mb_alu
15.5, 5
*End Part
**
**
** ASSEMBLY
**
*Assembly, name=Assembly
**
*Instance, name=mb_16-1, part=mb_16
*End Instance
**
*Node
      1,      165.875,  -66.4499969,         7.75
*Node
      2,   137.149994,  -95.1750031,         7.75
*Node
      3,   170.662506,  -114.324997,         7.75
*Nset, nset=Set-1, instance=mb_16-1, generate
 23,  26,   1
*Nset, nset=Set-2, instance=mb_16-1, generate
 23,  26,   1
*Nset, nset=Set-3, generate
 1,  3,  1
*Nset, nset=Set-4, generate
 1,  3,  1
*Nset, nset=Set-11, instance=mb_16-1
  5,  7, 15
*Nset, nset=b_Set-10, instance=mb_16-1
   1,   4,   5,   6,  42,  43
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*Elset, elset=b_Set-10, instance=mb_16-1, generate
 26,  50,   1
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*Elset, elset=s_Set-6, instance=mb_16-1
 5061, 5075, 5089, 5094, 5095, 5096, 5097, 5135, 5141, 5146, 5148, 5150, 5167, 5168
*Nset, nset=s_Set-8, instance=mb_16-1
   2,   4,   5,   8,  27,  29
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*Elset, elset=s_Set-8, instance=mb_16-1
   30,   35,   40,   45,   50,   55
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*Elset, elset=_Surf-1_SPOS, internal, instance=mb_16-1
    1,    2,    3,    4,    5,    6
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*Surface, type=ELEMENT, name=Surf-1
_Surf-1_SPOS, SPOS
*End Assembly
**
** MATERIALS
**
*Material, name=mb_alu
*Elastic
72000., 0.333
**
** BOUNDARY CONDITIONS
**
** Name: fixed_BC Type: Displacement/Rotation
*Boundary
Set-2, 1, 1
Set-2, 2, 2
Set-2, 3, 3
Set-2, 4, 4
Set-2, 5, 5
Set-2, 6, 6
** ----------------------------------------------------------------
**
** STEP: uniform_load
**
*Step, name=uniform_load, nlgeom=NO, perturbation
*Static
**
** LOADS
**
** Name: uniformed_load   Type: Pressure
*Dsload
Surf-1, P, 0.0001
**
** OUTPUT REQUESTS
**
**
** FIELD OUTPUT: F-Output-1
**
*Output, field
*Node Output
CF, RF, U
*Element Output, directions=YES
LE, S, SF
**
** HISTORY OUTPUT: H-Output-1
**
*Output, history, variable=PRESELECT
*End Step
** ----------------------------------------------------------------
**
** STEP: seveal_load
**
*Step, name=seveal_load, nlgeom=NO, perturbation
*Static
**
** LOADS
**
** Name: concentrated_force   Type: Concentrated force
*Cload
Set-11, 3, -0.0005
**
** OUTPUT REQUESTS
**
**
** FIELD OUTPUT: F-Output-1
**
*Output, field
*Node Output
CF, RF, U
*Element Output, directions=YES
LE, S, SF
**
** HISTORY OUTPUT: H-Output-1
**
*Output, history, variable=PRESELECT
*End Step
